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/COM,ANSYS RELEASE 2025 R2           BUILD 25.2      UP20250519       12:07:03
/PREP7
/TITLE,concrete_block--Transient Thermal (A5)
ANTYPE, 4
TOFFST,  273.150000
TRNOPT,FULL,,,,,NMK ,,,NO
THOPT,QUAS, 5.000000000E-02,              64,  20.0000000    ,  500.000000
DMPOPT,ESAV,NO
DMPOPT,EMAT,NO
*IF,_CDRDOFF,EQ,1,THEN     !if solid model was read in
_CDRDOFF=             !reset flag, numoffs already performed
*ELSE              !offset database for the following FE model
NUMOFF,NODE,    15767
NUMOFF,ELEM,     5605
NUMOFF,MAT ,        2
NUMOFF,REAL,        4
NUMOFF,TYPE,        4
*ENDIF
*SET,CID     ,  3.000000000000
*SET,TEMPERATURE,'TEMP                            '
*SET,TID     ,  4.000000000000
*SET,_ASMDIAG, 0.1134929825050
*SET,_DS_PROGRESS,  999.0000000000
*SET,_MAXELEMNUM,  5605.000000000
*SET,_MAXELEMTYPE,  4.000000000000
*SET,_MAXKXX ,  605000.0000000
*SET,_MAXNODENUM,  15767.00000000
*SET,_MAXREALCONST,  4.000000000000
*SET,_NUMELEM,  3015.000000000
*SET,_NUMNODE,  15767.00000000
*SET,_RETURN ,  0.000000000000
*SET,_STATUS ,  0.000000000000
*SET,_WALLBSOL,  12.11750000000
*SET,_WALLSTRT,  12.11750000000
*SET,_WB_PROJECTSCRATCH_DIR(1,       1,       1),'C:\Users\thero\Documents\projects\Coding\thermo_lab\_ProjectScratch\ScrFFCB\                                                                                                                                                                            '
*SET,_WB_SOLVERFILES_DIR(1,       1,       1),'C:\Users\thero\Documents\projects\Coding\thermo_lab\concrete_block_files\dp0\SYS\MECH\                                                                                                                                                                  '
*SET,_WB_USERFILES_DIR(1,       1,       1),'C:\Users\thero\Documents\projects\Coding\thermo_lab\concrete_block_files\user_files\                                                                                                                                                                    '
*SET,_XMAX   , 0.3287001873000E-01
*SET,_XMIN   ,  0.000000000000
*SET,_YMAX   , 0.2540000000000E-02
*SET,_YMIN   ,  0.000000000000
*SET,_ZMAX   ,-0.1840088699000E-01
*SET,_ZMIN   ,-0.1270000000000
DOF,DELETE
ETBLOCK,        4,        4
(2i9,19a9)
        1      279        0        0        0        0        0        0        0        0        0        0        0        0        0        0        0        0        0        0        0
        2      279        0        0        0        0        0        0        0        0        0        0        0        0        0        0        0        0        0        0        0
        3      174        2        0        0        0        0        0        0        2        1        0        0        5        0        0        0        0        0        1        0
        4      170        0        0        0        0        0        0        0        0        0        0        0        0        0        0        0        0        0        0        0
       -1
MAT ,        4
TYPE,        4
REAL,        3
NBLOCK,6,SOLID,     15767,     15767
(3i9,6e21.13e3)
        1        0        0 4.3522399040000E-003 8.4666666670000E-004-1.9631685540000E-002
        2        0        0 4.3522399040000E-003 1.6933333330000E-003-1.9631685540000E-002
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N,UNBL,LOC,       -1,
EBLOCK,19,SOLID,      5605,      3015
(19i10)
         1         1         1         1         0         0         0         0        20         0         1         1      3720      3714      3698      1755      3726      3713      3712
      4330     14754     14729      4329     10647     14752     14750     10646      4328     14770     14751     14728
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        -1
CMBLOCK,HEATED_SURFACE,NODE,      11  ! users node component definition
(8i10)
      2632     -2637      2644      3695     -3715     12505    -12516     12529
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CMBLOCK,MEDIA_INNER,NODE,      11  ! users node component definition
(8i10)
      3580     -3590      3676      4004     -4039     14495    -14516     14687
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CMBLOCK,MEDIA_OUTER,NODE,      15  ! users node component definition
(8i10)
      3485     -3495      3591      4001     -4003      4292     -4324     14304
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CMBLOCK,MEDIA_SURFACE,NODE,     194  ! users node component definition
(8i10)
      2645     -3676     12530    -14305     14307     14309     14311     14313
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CMBLOCK,PIPE_BODY,ELEM,       2  ! users element component definition
(8i10)
         1      -108
CMBLOCK,THERMAL_BODY,ELEM,       2  ! users element component definition
(8i10)
       109     -2913
RLBLOCK,       2,       4,      36,       7
(2i8,6g16.9)
(7g16.9)
       3      36  0.00000000      0.00000000      10.0000000      0.00000000      0.00000000      0.00000000
  0.00000000      0.00000000      0.00000000      0.00000000      0.00000000      0.00000000      0.00000000
  5330726.06      0.00000000      0.00000000      0.00000000      0.00000000      0.00000000      0.00000000
  0.00000000      0.00000000      0.00000000      0.00000000      0.00000000      0.00000000      0.00000000
  0.00000000      0.00000000      0.00000000      0.00000000      0.00000000      0.00000000      0.00000000
  0.00000000      70.0000000
       4      36  0.00000000      0.00000000      10.0000000      0.00000000      0.00000000      0.00000000
  0.00000000      0.00000000      0.00000000      0.00000000      0.00000000      0.00000000      0.00000000
  5330726.06      0.00000000      0.00000000      0.00000000      0.00000000      0.00000000      0.00000000
  0.00000000      0.00000000      0.00000000      0.00000000      0.00000000      0.00000000      0.00000000
  0.00000000      0.00000000      0.00000000      0.00000000      0.00000000      0.00000000      0.00000000
  0.00000000      70.0000000
MPTEMP,UNBL, 1, 1,  0.00000000    ,
MPDATA,UNBL, 1,EX  ,       1, 1, 2.000000000E+11,
MPTEMP,UNBL, 1, 1,  0.00000000    ,
MPDATA,UNBL, 1,NUXY,       1, 1, 0.300000000    ,
MPTEMP,UNBL, 1, 1,  0.00000000    ,
MPDATA,UNBL, 1,ALPX,       1, 1, 1.200000000E-05,
MPTEMP,UNBL, 1, 1,  0.00000000    ,
MPDATA,UNBL, 1,DENS,       1, 1,  7850.00000    ,
MPTEMP,UNBL, 1, 1,  0.00000000    ,
MPDATA,UNBL, 1,KXX ,       1, 1,  60.5000000    ,
MPTEMP,UNBL, 1, 1,  0.00000000    ,
MPDATA,UNBL, 1,RSVX,       1, 1, 1.700000000E-07,
MPTEMP,UNBL, 1, 1,  0.00000000    ,
MPDATA,UNBL, 1,C   ,       1, 1,  434.000000    ,
MPTEMP,UNBL, 1, 1,  0.00000000    ,
MPDATA,UNBL, 1,MURX,       1, 1,  10000.0000    ,
MPTEMP,UNBL,16, 1,  1.00000000    ,  2.00000000    ,  3.00000000
MPTEMP,UNBL,16, 4,  4.00000000    ,  5.00000000    ,  6.00000000
MPTEMP,UNBL,16, 7,  7.00000000    ,  8.00000000    ,  9.00000000
MPTEMP,UNBL,16,10,  10.0000000    ,  11.0000000    ,  12.0000000
MPTEMP,UNBL,16,13,  13.0000000    ,  14.0000000    ,  15.0000000
MPTEMP,UNBL,16,16,  16.0000000    ,
MPDATA,UNBL,16,UMID,       1, 1, 892940336.0    , 845231929.0    , 758591843.0
MPDATA,UNBL,16,UMID,       1, 4, 841823282.0    , 946154809.0    , 808870445.0
MPDATA,UNBL,16,UMID,       1, 7, 892691511.0    , 1684170085.    , 825241701.0
MPDATA,UNBL,16,UMID,       1,10, 538976288.0    , 538976288.0    , 538976288.0
MPDATA,UNBL,16,UMID,       1,13, 538976288.0    , 538976288.0    , 538976288.0
MPDATA,UNBL,16,UMID,       1,16, 538976288.0    ,
MPTEMP,UNBL,16, 1,  1.00000000    ,  2.00000000    ,  3.00000000
MPTEMP,UNBL,16, 4,  4.00000000    ,  5.00000000    ,  6.00000000
MPTEMP,UNBL,16, 7,  7.00000000    ,  8.00000000    ,  9.00000000
MPTEMP,UNBL,16,10,  10.0000000    ,  11.0000000    ,  12.0000000
MPTEMP,UNBL,16,13,  13.0000000    ,  14.0000000    ,  15.0000000
MPTEMP,UNBL,16,16,  16.0000000    ,
MPDATA,UNBL,16,UVID,       1, 1, 929445425.0    , 875573298.0    , 758135090.0
MPDATA,UNBL,16,UVID,       1, 4, 1697461348.    , 1717906785.    , 1647732013.
MPDATA,UNBL,16,UVID,       1, 7, 1680881766.    , 1631138358.    , 1647403363.
MPDATA,UNBL,16,UVID,       1,10, 538976288.0    , 538976288.0    , 538976288.0
MPDATA,UNBL,16,UVID,       1,13, 538976288.0    , 538976288.0    , 538976288.0
MPDATA,UNBL,16,UVID,       1,16, 538976288.0    ,
MPTEMP,UNBL, 1, 1,  0.00000000    ,
MPDATA,UNBL, 1,DENS,       2, 1,  2400.00000    ,
MPTEMP,UNBL, 4, 1,  20.0000000    ,  100.000000    ,  400.000000
MPTEMP,UNBL, 4, 4,  500.000000    ,
MPDATA,UNBL, 4,KXX ,       2, 1,  2.50000000    ,  2.50000000    ,  2.00000000
MPDATA,UNBL, 4,KXX ,       2, 4,  2.00000000    ,
MPTEMP,UNBL, 5, 1,  20.0000000    ,  100.000000    ,  200.000000
MPTEMP,UNBL, 5, 4,  400.000000    ,  500.000000    ,
MPDATA,UNBL, 5,C   ,       2, 1,  900.000000    ,  900.000000    ,  1000.00000
MPDATA,UNBL, 5,C   ,       2, 4,  1100.00000    ,  1100.00000    ,
MPTEMP,UNBL,16, 1,  1.00000000    ,  2.00000000    ,  3.00000000
MPTEMP,UNBL,16, 4,  4.00000000    ,  5.00000000    ,  6.00000000
MPTEMP,UNBL,16, 7,  7.00000000    ,  8.00000000    ,  9.00000000
MPTEMP,UNBL,16,10,  10.0000000    ,  11.0000000    ,  12.0000000
MPTEMP,UNBL,16,13,  13.0000000    ,  14.0000000    ,  15.0000000
MPTEMP,UNBL,16,16,  16.0000000    ,
MPDATA,UNBL,16,UVID,       2, 1, 926300004.0    , 929249336.0    , 758199397.0
MPDATA,UNBL,16,UVID,       2, 4, 942486627.0    , 942878009.0    , 1631007533.
MPDATA,UNBL,16,UVID,       2, 7, 925918512.0    , 1681338423.    , 926376550.0
MPDATA,UNBL,16,UVID,       2,10, 538976288.0    , 538976288.0    , 538976288.0
MPDATA,UNBL,16,UVID,       2,13, 538976288.0    , 538976288.0    , 538976288.0
MPDATA,UNBL,16,UVID,       2,16, 538976288.0    ,
EXTOPT,ATTR,      0,      0,      0
EXTOPT,ESIZE,  0,  0.0000
EXTOPT,ACLEAR,      0
KBC,     1,     0
TREF,  0.00000000
IRLF,  0
BFUNIF,TEMP,  100.000000
ACEL,  0.00000000    ,  0.00000000    ,  0.00000000
OMEGA,  0.00000000    ,  0.00000000    ,  0.00000000
DOMEGA,  0.00000000    ,  0.00000000    ,  0.00000000
CGLOC,  0.00000000    ,  0.00000000    ,  0.00000000
CGOMEGA,  0.00000000    ,  0.00000000    ,  0.00000000
DCGOMG,  0.00000000    ,  0.00000000    ,  0.00000000
AUTOTS,ON
DELTIM,  10.0000000    ,  10.0000000    ,  10.0000000    ,OFF
KUSE,     0
TIME,  14400.0000
ALPHAD,  0.00000000
BETAD,  0.00000000
DMPRAT,  0.00000000
DMPSTR,  0.00000000
TIMINT,ON  ,THER
TINTP,     0.0050000, , ,    -1.0000000,     0.5000000,    -1.0000000,     0.0000000,     0.9000000, 0
CNVTOL,HEAT,  0.00000000    , 1.000000000E-03,  2, 1.000000000E-06
CRPLIM, 0.100000000    ,   0
CRPLIM,  0.00000000    ,   1
NCNV,     1,  0.00000000    ,     0,  0.00000000    ,  0.00000000
NEQIT,     0

ERESX,DEFA
OUTRES, ALL,NONE,
OUTRES,NSOL, ALL,
OUTRES,RSOL, ALL,
OUTRES,EANG, ALL,
OUTRES,VENG, ALL,
OUTRES,FFLU, ALL,
OUTRES,CONT, ALL,
FINISH
